*Heading
** Job name: Job-2 Model name: Thermal
** Generated by: Abaqus/CAE 2024.HF2
*Preprint, echo=NO, model=NO, history=NO, contact=NO
**
** PARTS
**
*Part, name=Part-1
*Node
      1,       -13.75,         -7.5,           0.
      2,       -23.75,         6.25,           0.
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*Element, type=C3D8
  1,  59,  60,  95,  96, 205, 206, 241, 242
  2, 141, 113,  82, 114, 287, 259, 228, 260
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*Nset, nset=Set-1, generate
   1,  584,    1
*Elset, elset=Set-1, generate
   1,  360,    1
*Nset, nset=temp_left
   7,   8,  31,  32,  33,  34
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*Elset, elset=temp_left
   5,  22,  23,  24,  28,  29
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*Nset, nset=temp_right
   2,   3,  16,  17,  18, 148
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*Elset, elset=temp_right
  11,  13,  40,  71, 131, 133, 160, 191, 251, 253, 280, 311
*Nset, nset=insulation
   1,   2,   3,   4,   5,   6
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*Elset, elset=insulation
   1,   2,   3,   4,   5,   6
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** Section: Section-1
*Solid Section, elset=Set-1, material=Material-1
,
*End Part
**
**
** ASSEMBLY
**
*Assembly, name=Assembly
**
*Instance, name=Part-1-1, part=Part-1
*End Instance
**
*Nset, nset=Set-1, instance=Part-1-1, generate
 439,  584,    1
*Elset, elset=Set-1, instance=Part-1-1, generate
 241,  360,    1
*Nset, nset=Set-2, instance=Part-1-1
   7,   8,  31,  32,  33,  34
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*Elset, elset=Set-2, instance=Part-1-1
   5,  22,  23,  24,  28,  29
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*Nset, nset=Set-3, instance=Part-1-1
   2,   3,  16,  17,  18, 148
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*Elset, elset=Set-3, instance=Part-1-1
  11,  13,  40,  71, 131, 133, 160, 191, 251, 253, 280, 311
*Elset, elset=_Surf-1_S3, internal, instance=Part-1-1
   3,   9,  17,  18,  19,  50
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*Elset, elset=_Surf-1_S5, internal, instance=Part-1-1
  13,  20,  47,  48,  49,  56
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*Elset, elset=_Surf-1_S6, internal, instance=Part-1-1
  22,  25,  26,  28,  32,  46
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*Elset, elset=_Surf-1_S4, internal, instance=Part-1-1
  20,  21,  27,  62,  66,  68
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*Elset, elset=_Surf-1_S2, internal, instance=Part-1-1, generate
 241,  360,    1
*Elset, elset=_Surf-1_S1, internal, instance=Part-1-1, generate
   1,  120,    1
*Surface, type=ELEMENT, name=Surf-1
_Surf-1_S3, S3
_Surf-1_S5, S5
_Surf-1_S6, S6
_Surf-1_S4, S4
_Surf-1_S2, S2
_Surf-1_S1, S1
*End Assembly
**
** MATERIALS
**
*Material, name=Material-1
*Conductivity
10.,
** ----------------------------------------------------------------
**
** STEP: Step-1
**
*Step, name=Step-1, nlgeom=NO
*Heat Transfer, steady state, deltmx=0.
1., 1., 1e-05, 1.,
**
** BOUNDARY CONDITIONS
**
** Name: BC-1 Type: Temperature
*Boundary
Set-2, 11, 11, 10.
** Name: BC-2 Type: Temperature
*Boundary
Set-3, 11, 11, 20.
**
** OUTPUT REQUESTS
**
*Restart, write, frequency=0
**
** FIELD OUTPUT: F-Output-2
**
*Output, field
*Node Output, variable=PRESELECT
*Element Output, directions=YES
HFL, TEMP
**
** FIELD OUTPUT: F-Output-1
**
*Output, field, variable=PRESELECT
*Output, history, frequency=0
*End Step
